# Barn door Tracker Stepper motor
# Start and stop elevation and azimuth
u := [31.47 deg; 222.08 deg; hhmmss(14, 40, 0)]
v := [30.88 deg; 223.36 deg; hhmmss(14, 45, 0)]
θ := acos(sin(u[0])*sin(v[0]) + cos(u[0])*cos(v[0])*cos(v[1] - u[1]))
time := v[2] - u[2] = 5 min
sun_rate := θ/time = 0.248791 deg/min
sun_rate*24 hr = 358.26 deg
# Thread Size, M8
Pitch := 2 mm
Steps_rev := 200*8 = 1600
Tracker_arm := 264 mm
Tracker_angle := asin(2 mm/Tracker_arm) = 0.434063 deg
Motor_rate := sun_rate/Tracker_angle = 0.573169 1/min
